**
** IM7/8552, 134 g/m^2, 59.1% fiber volume fraction, 33% resin content
** Hand layup, autoclave cure at 180 C
** Units: N, mm, s
** Nominal ply thickness: 0.131 mm (actual may be closer to 0.125 mm)
**
** See the file `IM7-8552-C3D.inp` for more details on the material properties
** and references.
**
** Shear nonlinearity coefficients
** Note a: The shear nonlinearity coefficients used here for testing are not
** the values recommended for this material. They are used here for
** testing purposes only. The recommended values for this material are
**
** alpha_PL = 4.06e-9
** n_PL = 5.4
**
** These values are based on fitting the Ramberg-Osgood expression
** to the data reported in:
** C. A. Rose, C. G. Dávila, and F. A. Leone, Analysis methods for progressive
** damage of composite structures, Hampton, VA, NASA/TM–2013-218024, Jul. 2013.
** A. S. Kaddour and M. J. Hinton, Input data for test cases used in
** benchmarking triaxial failure theories of composites, Journal of Composite
** Materials, vol. 46, no. 19–20, Art. no. 19–20, Sep. 2012, doi:
** 10.1177/0021998312449886.
**
*Material, name=IM7-8552
*Density
 <density>,
*User material, constants=40
** feature flags, 2,   thickness, 4, 5, 6, 7, 8
 <feature_flags>,  , <thickness>,  ,  ,  ,  ,  ,
**
**  9         10        11        12        13        14        15        16
**  E1,       E2,       G12,      nu12,     nu23,     YT,       SL        GYT
    171420.0, 9080.0,   5290.0,   0.32,     0.52,     62.3,     92.30,    0.277,
**
**  17        18        19        20        21        22        23        24
**  GSL,      eta_BK,   YC,       alpha0    E3,       G13,      G23,      nu13,
    0.788,    1.634,    199.8,    0.925,      ,          ,         ,          ,
**
**  25        26        27        28        29        30        31        32
**  alpha11,  alpha22,  alpha_PL, n_PL,     XT,       fXT,      GXT,      fGXT,
**                      Note a    Note a
           ,         ,  4.412d-10, 5.934,     ,          ,         ,          ,
**
**  33        34        35        36        37        38        39        40
**  XC,       fXC,      GXC,      fGXC,     cl,       w_kb,     T_sf,     mu
    1200.1,      ,         ,          ,   <cl>,      <wkb>,   <T_sf>,    <mu>
**
*Depvar
 25,
 1, CDM_d2
 2, CDM_Fb1
 3, CDM_Fb2
 4, CDM_Fb3
 5, CDM_B
 6, CDM_Lc1
 7, CDM_Lc2
 8, CDM_Lc3
 9, CDM_FIm
10, CDM_alpha
11, CDM_STATUS
12, CDM_Plas12
13, CDM_Inel12
14, CDM_FIfT
15, CDM_slide1
16, CDM_slide2
17, CDM_FIfC
18, CDM_d1T
19, CDM_d1C
20, CDM_Plas13
21, CDM_Inel13
22, CDM_phi0_12
23, CDM_gamma_12
24, CDM_phi0_13
25, CDM_gamma_13
*Characteristic Length, definition=USER, components=3
