*Heading
 Single element test for fiber compression DGD
**
*Parameter
l = 0.2
w = 0.2
t = 0.15
wkbToTotal = 0.6
stepDuration = 0.1
** Material definition
 feature_flags = 10301
 cl = 0
 wkb = wkbToTotal*l
 T_sf = 0
 mu = 0
 density = 1.57e-09
 thickness = 0
**
** CompDam parameters
**
*PARAMETER TABLE TYPE, NAME=KEY_FLOAT, parameters=2
STRING
FLOAT
*PARAMETER TABLE TYPE, NAME=KEY_INT, parameters=2
STRING
INTEGER
*TABLE COLLECTION, NAME=COMPDAM_PARAM
** CompDam parameters with float values
*PARAMETER TABLE, type=KEY_FLOAT, label=CDP_FLOAT
fkt_fiber_failure_angle, -1.d0
debug_kill_at_total_time, -1.d0
**
** CompDam parameters with integer values
** 0 = False, 1 = True
*PARAMETER TABLE, type=KEY_INT, label=CDP_INT
logLevel, 3
**
** PARTS
**
*Part, name=Part-1
*Node
      1,  <l>,          <w>,          <t>
      2,  <l>,           0.,          <t>
      3,  <l>,          <w>,           0.
      4,  <l>,           0.,           0.
      5,  0.,           <w>,          <t>
      6,  0.,            0.,          <t>
      7,  0.,           <w>,           0.
      8,  0.,            0.,           0.
*Element, type=C3D8R
 1, 3, 4, 2, 1, 7, 8, 6, 5
*Nset, nset=loadApp
 4,
*Nset, nset=loadFollowers
 1, 2, 3
*Nset, nset=pin
 8,
*Nset, nset=pinx
 5, 6, 7
*Nset, nset=all, generate
 1,  8,  1
*Elset, elset=all
 1,
*Orientation, name=Ori-1
          1.,           0.,           0.,          0.,           1.,           0.
 3, 0.
** Section: Section-1
*Solid Section, elset=all, orientation=Ori-1, material=IM7-8552, controls=SectionCtrl-1
,
*End Part
**
**
** ASSEMBLY
**
*Assembly, name=Assembly
**
*Instance, name=Part-1-1, part=Part-1
*End Instance
**
** Constraint: LoadApp
*Equation
 2
 Part-1-1.loadFollowers, 1, -1., Part-1-1.loadApp, 1, 1.
*Equation
 4
 Part-1-1.5, 2, -1., Part-1-1.1, 2, 1., Part-1-1.6, 2, 1., Part-1-1.2, 2, -1.
*Equation
 4
 Part-1-1.7,2,-1., Part-1-1.3,2,1., Part-1-1.8,2,1., Part-1-1.4,2,-1.
*End Assembly
**
*Section controls, name=SectionCtrl-1, distortion control=YES
**
*Amplitude, name=Amp-1, definition=SMOOTH STEP
             0.,              0.,    <stepDuration>,              1.
**
** MATERIALS
**
*Include, input=IM7-8552-C3D-25sv.inp
**
** INITIAL CONDITIONS
**
*Initial Conditions, Type=Solution
  Part-1-1.all,  0.d0,  0.d0,  0.d0,  0.d0,  0.d0,  0.d0,  0.d0,
  0.d0,          0.d0,  0.d0,     1,  0.d0,  0.d0,  0.d0,  0.d0,
  0.d0,          0.d0,  0.d0,  0.d0,  0.d0,  0.d0,  0.d0,  0.d0,
  0.d0,          0.d0
** ----------------------------------------------------------------
**
** STEP: Step-1
**
*Step, name=Step-1, nlgeom=YES
*Dynamic, Explicit
 , <stepDuration>
*Bulk Viscosity
 0.06, 1.2
** Mass Scaling: Semi-Automatic
**               Whole Model
*Fixed Mass Scaling, factor=10000.
**
** BOUNDARY CONDITIONS
**
** Applied displacement end
*Boundary, amplitude=Amp-1
Part-1-1.loadApp, 1, 1, -0.01
Part-1-1.loadApp, 3, 3
*Boundary, amplitude=Amp-1
Part-1-1.all, 3, 3
** Fixed end
*Boundary, amplitude=Amp-1
Part-1-1.pin, 1, 1
Part-1-1.pin, 2, 2
*Boundary, amplitude=Amp-1
Part-1-1.pinx, 1, 1
Part-1-1.6, 2, 2
**
** OUTPUT REQUESTS
**
*Output, field, number interval=100
*Node Output
U, RF
*Element Output
S, LE, SDV
**
** HISTORY OUTPUT: H-Output-1
**
*Output, history, frequency=1
*Energy Output
 ALLIE, ALLKE
*Node Output, nset=Part-1-1.loadApp
RF1, U1, U2
*Element Output, elset=Part-1-1.all
S, LE, SDV
*End Step
