*Heading
 Single element test for fiber compression DGD
**
*Parameter
l = 0.15
w = 0.15
t = 0.15
wkbToTotal = 1
stepDuration = 0.1
l2 = l*2
ml = l*-1
** Material definition
 feature_flags = 30500
 cl = 0
 wkb = wkbToTotal*l
 T_sf = 0
 mu = 0
 density = 1.57e-09
 thickness = 0
**
** PARTS
**
*Part, name=Part-1
*Node
      1,  <l>,          <w>,          <t>
      2,  <l>,           0.,          <t>
      3,  <l>,          <w>,           0.
      4,  <l>,           0.,           0.
      5,  0.,           <w>,          <t>
      6,  0.,            0.,          <t>
      7,  0.,           <w>,           0.
      8,  0.,            0.,           0.
** Nodes for springs
      9,  <l>,          <w>,         <ml>
     10,  <l>,           0.,         <ml>
     11,  <l>,          <w>,         <l2>
     12,  <l>,           0.,         <l2>
*Element, type=C3D8R
 1, 3, 4, 2, 1, 7, 8, 6, 5
*Nset, nset=loadApp
 4,
*Nset, nset=loadFollowers
 1, 2, 3, 9, 10, 11, 12
*Nset, nset=pin
 8,
*Nset, nset=pinx
 5, 6, 7
*Nset, nset=all, generate
 1,  8,  1
*Nset, nset=spring_nodes
 9, 10, 11, 12
*Elset, elset=all
 1,
*Orientation, name=Ori-1
          1.,           0.,           0.,          0.,           1.,           0.
 3, 0.
** Section: Section-1
*Solid Section, elset=all, orientation=Ori-1, material=IM7-8552, controls=SectionCtrl-1
,
** Spring
*Spring, elset=springs
2,
10.,
*Element, type=SpringA, elset=springs
 2, 9, 3
 3, 10, 4
 4, 11, 1
 5, 12, 2
*Element, type=MASS, elset=m1
 102, 9
 103, 10
 104, 11
 105, 12
*Mass, elset=m1
 1.57e-014,
*End Part
**
**
** ASSEMBLY
**
*Assembly, name=Assembly
**
*Instance, name=Part-1-1, part=Part-1
*End Instance
**
** Constraint: LoadApp
*Equation
 2
 Part-1-1.loadFollowers, 1, -1., Part-1-1.loadApp, 1, 1.
*Equation
 2
 Part-1-1.1, 2, -1., Part-1-1.3, 2, 1.
*Equation
 2
 Part-1-1.1, 3, -1., Part-1-1.2, 3, 1.
*Equation
 4
 Part-1-1.5, 2, -1., Part-1-1.1, 2, 1., Part-1-1.6, 2, 1., Part-1-1.2, 2, -1.
*Equation
 4
 Part-1-1.7,2,-1., Part-1-1.3,2,1., Part-1-1.8,2,1., Part-1-1.4,2,-1.
*Equation
 4
 Part-1-1.5, 3, -1., Part-1-1.1, 3, 1., Part-1-1.6, 3, 1., Part-1-1.2, 3, -1.
*Equation
 4
 Part-1-1.7,3,-1., Part-1-1.3,3,1., Part-1-1.8,3,1., Part-1-1.4,3,-1.
*End Assembly
**
*Section controls, name=SectionCtrl-1, distortion control=YES
**
*Amplitude, name=Amp-1, definition=SMOOTH STEP
             0.,              0.,    <stepDuration>,              1.
**
** MATERIALS
**
*Include, input=IM7-8552-C3D-25sv.inp
*Damping, alpha=1.d+4
**
** INITIAL CONDITIONS
**
*Initial Conditions, Type=Solution
  Part-1-1.all,  0.d0,  0.d0,  0.d0,  0.d0,  0.d0,  0.d0,  0.d0,
  0.d0,          0.d0,  0.d0,     1,  0.d0,  0.d0,  0.d0,  0.d0,
  0.d0,          0.d0,  0.d0,  0.d0,  0.d0,  0.d0,  0.d0,  0.d0,
  0.d0,          0.d0,
** ----------------------------------------------------------------
**
** STEP: Step-1
**
*Step, name=Step-1, nlgeom=YES
*Dynamic, Explicit
 , <stepDuration>
*Bulk Viscosity
 0.06, 1.2
** Mass Scaling: Semi-Automatic
**               Whole Model
*Fixed Mass Scaling, factor=10000.
**
** BOUNDARY CONDITIONS
**
** Applied displacement end
*Boundary, amplitude=Amp-1
Part-1-1.loadApp, 1, 1, -0.01
** Fixed end
*Boundary, amplitude=Amp-1
Part-1-1.pin, 1, 3
*Boundary, amplitude=Amp-1
Part-1-1.pinx, 1, 1
Part-1-1.6, 2, 2
Part-1-1.7, 3, 3
** Springs
*Boundary, amplitude=Amp-1
Part-1-1.spring_nodes, 3, 3
**
** OUTPUT REQUESTS
**
*Output, field, number interval=100
*Node Output
U, RF
*Element Output, elset=Part-1-1.all
S, LE, SDV
**
** HISTORY OUTPUT: H-Output-1
**
*Output, history, frequency=1
*Energy Output
 ALLIE, ALLKE
*Node Output, nset=Part-1-1.loadApp
RF1, U1, U2
*Element Output, elset=Part-1-1.all
S, LE, SDV
*End Step
