*Heading
 Single element test for matrix tension
**
*Parameter
 lengthx = 0.1
 lengthy = 0.15
 lengthz = 0.2
 displacement = 0.02
** Material definition
 feature_flags = 100000
 mu = 0
 density = 1.57e-05
 thickness = 0
**
** CompDam parameters
**
*PARAMETER TABLE TYPE, NAME=KEY_FLOAT, parameters=2
STRING
FLOAT
*PARAMETER TABLE TYPE, NAME=KEY_INT, parameters=2
STRING
INTEGER
*TABLE COLLECTION, NAME=COMPDAM_PARAM
** CompDam parameters with float values
*PARAMETER TABLE, type=KEY_FLOAT, label=CDP_FLOAT
debug_kill_at_total_time, -1.d0
**
** CompDam parameters with integer values
** 0 = False, 1 = True
*PARAMETER TABLE, type=KEY_INT, label=CDP_INT
logLevel, 3
set_status_0_on_d2, 1
**
** NODES
**
*NODE, NSET=GLOBAL
      1,            0.,             0.,             0.
      2,      <lengthx>,            0.,             0.
      3,      <lengthx>,      <lengthy>,            0.
      4,            0.,       <lengthy>,            0.
      5,            0.,             0.,      <lengthz>
      6,      <lengthx>,            0.,      <lengthz>
      7,      <lengthx>,      <lengthy>,     <lengthz>
      8,            0.,       <lengthy>,     <lengthz>
*NSET, NSET=X+
  2, 3, 6, 7
*NSET, NSET=X-
  1, 4, 5, 8
*NSET, NSET=Y+
  3, 4, 7, 8
*NSET, NSET=Y-
  1, 2, 5, 6
*NSET, NSET=Z+
  5, 6, 7, 8
*NSET, NSET=Z-
  1, 2, 3, 4
**
** ELEMENTS
**
*ELEMENT, TYPE=C3D8R, ELSET=ALL_ELEMS
  1, 1, 2, 3, 4, 5, 6, 7, 8
**
** PROPERTIES
**
*SOLID SECTION, ELSET=ALL_ELEMS, MATERIAL=IM7-8552
**
** MATERIALS
**
*Material, name=IM7-8552
*Density
 <density>,
*User material, constants=40
** feature flags, 2,   thickness, 4, 5, 6, 7, 8
 <feature_flags>,  , <thickness>,  ,  ,  ,  ,  ,
**
**  9         10        11        12        13        14        15        16
**  E1,       E2,       G12,      nu12,     nu23,     YT,       SL,       GYT,
    171420.0, 9080.0,   5290.0,   0.32,     0.52,     62.3,     92.30,    0.277,
**
**  17        18        19        20        21        22        23        24
**  GSL,      eta_BK,   YC,       alpha0    E3,       G13,      G23,      nu13,
    0.788,    1.634,    199.8,    0.925,      ,          ,         ,          ,
**
**  25        26        27        28        29        30        31        32
**  alpha11,  alpha22,  alpha_PL, n_PL,     XT,       fXT,      GXT,      fGXT,
           ,         ,          ,     ,       ,          ,         ,          ,
**
**  33        34        35        36        37        38        39        40
**  XC,       fXC,      GXC,      fGXC,     cl,       w_kb,     T_sf,     mu,
      ,          ,         ,          ,       ,           ,         ,
**
*Depvar, delete=11
  19,
  1, CDM_d2
  2, CDM_Fb1
  3, CDM_Fb2
  4, CDM_Fb3
  5, CDM_B
  6, CDM_Lc1
  7, CDM_Lc2
  8, CDM_Lc3
  9, CDM_FIm
 10, CDM_alpha
 11, CDM_STATUS
 12, CDM_Plas12
 13, CDM_Inel12
 14, CDM_FIfT
 15, CDM_slide1
 16, CDM_slide2
 17, CDM_FIfC
 18, CDM_d1T
 19, CDM_d1C
*Characteristic Length, definition=USER, components=3
**
** INITIAL CONDITIONS
**
*Initial Conditions, Type=Solution
 ALL_ELEMS,  0.d0,  0.d0,  0.d0,  0.d0,  0.d0,  0.d0,  0.d0,
 0.d0,       0.d0,  0.d0,     1,  0.d0,  0.d0,  0.d0,  0.d0,
 0.d0,       0.d0,  0.d0,  0.d0
*BOUNDARY
  Y-, 2, 2, 0
  X-, 1, 1, 0
  Z-, 3, 3, 0
**
** Equations for constraining keeping the 1-direction faces parallel
*Equation
 2
 2, 1, 1., 3, 1, -1.
 2
 3, 1, 1., 6, 1, -1.
 2
 6, 1, 1., 7, 1, -1.
** Equations for constraining keeping the 3-direction faces parallel
*Equation
 2
 5, 3, 1., 6, 3, -1.
 2
 6, 3, 1., 7, 3, -1.
 2
 7, 3, 1., 8, 3, -1.
**
*Amplitude, name=LoadUp, definition=SMOOTH STEP
0., 0., 0.1, 1.
** STEP 1 - TENSION MECHANICAL CYCLE
**
*STEP, NLGEOM=YES
*Dynamic, Explicit
 , 0.1, ,
**
** OUTPUT
**
*OUTPUT, FIELD
*ELEMENT OUTPUT
  SDV, S, LE
*Node Output
 U, RF
*OUTPUT, HISTORY, frequency=1
*Energy Output
 ALLIE, ALLKE, ALLPD, ALLSE
*NODE OUTPUT, NSET=Y+
 U
*NODE OUTPUT, NSET=Y+
 RF
*ELEMENT OUTPUT, ELSET=ALL_ELEMS
 SDV, S, LE, DENSITY
**
** LOADING
**
*Boundary, AMPLITUDE=LoadUp
 Y+, 2, 2, <displacement>
*END STEP
