*Heading
 Single cohesive element with shear loading under normal compression
**
*Parameter
 length = 0.2
 thickness = 0.0
 out_of_plane_thk = 0.5
 displacement = 0.03
 stepDuration = 0.1
 compressive_displacement = -0.00001
** Material definition
 feature_flags = 200000
 material_options = ""
 constit_thickness = 1.0
**
*Node, nset=Nodes
      1,            0.,            0.
      2,      <length>,            0.
      3,      <length>,      <thickness>
      4,            0.,      <thickness>
*Nset, nset=X+
  2, 3
*Nset, nset=X-
  1, 4
*Nset, nset=Y+
  3, 4
*Nset, nset=Y-
  1, 2
**
*Element, type=COH2D4, elset=COHESIVE
  1, 1, 2, 3, 4
**
*Cohesive Section, elset=COHESIVE, material=IM7-8552, response=TRACTION SEPARATION, thickness=SPECIFIED
 <constit_thickness>, <out_of_plane_thk>
**
*Include, input=IM7-8552-COH.inp
**
*Initial Conditions, Type=Solution
 COHESIVE,  0.d0,  0.d0,  0.d0,  0.d0,  0.d0,  0.d0,  0.d0,
 0.d0,      0.d0,  0.d0,     1,  0.d0,  0.d0,  0.d0,  0.d0,
 0.d0,      0.d0,  0.d0,  0.d0
*Boundary
  Y+, 1, 2, 0
  Y-, 1, 2, 0
**
*Amplitude, name=LoadUp, definition=SMOOTH STEP
 0., 0., <stepDuration>, 1.
**
*Step, name=Compression, nlgeom=YES
*Dynamic, Explicit
 , <stepDuration>, ,
*Fixed Mass Scaling, factor=5000.
**
*Boundary, AMPLITUDE=LoadUp
 Y+, 2, 2, <compressive_displacement>
**
*Parameter
 RFU_output_nset='Y+'
*Include, input=test_COH_outputs.inp
**
*End Step
*Step, name=Shear, nlgeom=YES
*Dynamic, Explicit
 , <stepDuration>, ,
**
*Boundary, AMPLITUDE=LoadUp
 Y+, 1, 1, <displacement>
**
*Parameter
 RFU_output_nset='Y+'
*Include, input=test_COH_outputs.inp
**
*End Step
