*Heading
 Single cohesive element test for mode I response
**
*Parameter
 length = 0.2
 el_thickness = 0.0
 displacement = 0.01
 stepDuration = 0.1
 density = 1.57e-9
 mass_scaling_factor = 5000
** Material definition
 feature_flags = 200000
 material_options = ""
 constit_thickness = 1.0
**
*Node, nset=Nodes
      1,            0.,            0.,             0.
      2,      <length>,            0.,             0.
      3,      <length>,      <length>,             0.
      4,            0.,      <length>,             0.
      5,            0.,            0., <el_thickness>
      6,      <length>,            0., <el_thickness>
      7,      <length>,      <length>, <el_thickness>
      8,            0.,      <length>, <el_thickness>
*Nset, nset=X+
  2, 3, 6, 7
*Nset, nset=X-
  1, 4, 5, 8
*Nset, nset=Y+
  3, 4, 7, 8
*Nset, nset=Y-
  1, 2, 5, 6
*Nset, nset=Z+
  5, 6, 7, 8
*Nset, nset=Z-
  1, 2, 3, 4
**
*Element, type=COH3D8, elset=COHESIVE
  1, 1, 2, 3, 4, 5, 6, 7, 8
**
*Cohesive Section, elset=COHESIVE, material=IM7-8552, response=TRACTION SEPARATION, thickness=SPECIFIED
 <constit_thickness>,
**
*Include, input=IM7-8552-COH.inp
**
*Initial Conditions, Type=Solution
 COHESIVE,  0.d0,  0.d0,  0.d0,  0.d0,  0.d0,  0.d0,  0.d0,
 0.d0,      0.d0,  0.d0,     1,  0.d0,  0.d0,  0.d0,  0.d0,
 0.d0,      0.d0,  0.d0,  0.d0
*Boundary
  Z+, 1, 2, 0
  Z-, 1, 3, 0
**
*Amplitude, name=LoadUp, definition=SMOOTH STEP
 0., 0., <stepDuration>, 1.
**
*Step, nlgeom=YES
*Dynamic, Explicit
 , <stepDuration>, ,
*Fixed Mass Scaling, factor=<mass_scaling_factor>
**
*Boundary, AMPLITUDE=LoadUp
 Z+, 3, 3, <displacement>
**
*Parameter
 RFU_output_nset='Z+'
*Include, input=test_COH_outputs.inp
**
*End Step
