*Heading
 Single cohesive element test for mode I response
**
*Parameter
 length = 0.2
 el_thickness = 0.0
 displacement = 0.08
 stepDuration = 0.1
** Material definition
 feature_flags = 200000
 material_options = ", effmod"
 mu = 0.3
 mat_density = 1.57e-09
 YT = 62.3
 SL = 92.3
 GYT = 0.277
 GSL = 0.788
 BK = 1.634
 YC = 199.8
 alpha0 = 0.925
 Pen2 = 1.e6
** Targets
 target_mass = 1.26e-12
 target_dt = 2.0e-8
** Calculations for constit_thickness != 1
 coh_area = length*length
 ST = YC*cos(alpha0)*(sin(alpha0) + cos(alpha0)/tan(2*alpha0))
 Pen1 = Pen2*GYT*SL**2/(GSL*YT**2)
 Pen3 = Pen2*GYT*ST**2/(GSL*YT**2)
 E = (Pen1+Pen3)*0.5 + Pen2*0.75
**
 calc_rho = (target_mass/(coh_area*target_dt))**2/E
 calc_ct = coh_area*target_dt**2*E/target_mass
** Replace the values in the following with calc_rho and calc_ct to use nondefault constitutive thickness
 density = mat_density
 constit_thickness = 1.0
**
 mass_scaling_factor = 1000
**
*Node, nset=Nodes
      1,            0.,            0.,             0.
      2,      <length>,            0.,             0.
      3,      <length>,      <length>,             0.
      4,            0.,      <length>,             0.
      5,            0.,            0., <el_thickness>
      6,      <length>,            0., <el_thickness>
      7,      <length>,      <length>, <el_thickness>
      8,            0.,      <length>, <el_thickness>
*Nset, nset=X+
  2, 3, 6, 7
*Nset, nset=X-
  1, 4, 5, 8
*Nset, nset=Y+
  3, 4, 7, 8
*Nset, nset=Y-
  1, 2, 5, 6
*Nset, nset=Z+
  5, 6, 7, 8
*Nset, nset=Z-
  1, 2, 3, 4
**
*Element, type=COH3D8, elset=COHESIVE
  1, 1, 2, 3, 4, 5, 6, 7, 8
**
*Cohesive Section, elset=COHESIVE, material=IM7-8552, response=TRACTION SEPARATION, thickness=SPECIFIED
 <constit_thickness>,
**
*Material, name=IM7-8552
*Density
 <density>,
*User material, constants=40 <material_options>
** feature flags, 2,   thickness,           4, 5, 6, 7, 8
 <feature_flags>,  ,   <constit_thickness>,  ,  ,  ,  ,  ,
**
**  9         10        11        12        13        14        15        16
**  E1,       E2,       G12,      nu12,     nu23,     YT,       SL        GYT
      ,         ,          ,          ,         ,     <YT>,     <SL>,    <GYT>,
**
**  17        18        19        20        21        22        23        24
**  GSL,      eta_BK,   YC,       alpha0    Pen       G13,      G23,      nu13,
    <GSL>,    <BK>,     <YC>,     <alpha0>, <Pen2>,      ,         ,          ,
**
**  25        26        27        28        29        30        31        32
**  alpha11,  alpha22,  alpha_PL, n_PL,     XT,       fXT,      GXT,      fGXT,
           ,         ,          ,     ,       ,          ,         ,          ,
**
**  33        34        35        36        37        38        39        40
**  XC,       fXC,      GXC,      fGXC,     cl,       w_kb,     T_sf,     mu
      ,          ,         ,          ,           ,       ,         ,     <mu>
**
*Depvar
  19,
  1, COH_dmg
  2, COH_delta_s1
  3, COH_delta_n
  4, COH_delta_s2
  5, COH_B
  9, COH_FI
 11, COH_status
 15, COH_slide1
 16, COH_slide2
**
*Initial Conditions, Type=Solution
 COHESIVE,  0.d0,  0.d0,  0.d0,  0.d0,  0.d0,  0.d0,  0.d0,
 0.d0,      0.d0,  0.d0,     1,  0.d0,  0.d0,  0.d0,  0.d0,
 0.d0,      0.d0,  0.d0,  0.d0
*Boundary
  Z+, 1, 2, 0
  Z-, 1, 3, 0
**
*Amplitude, name=LoadUp, definition=SMOOTH STEP
 0., 0., <stepDuration>, 1.
**
*Step, nlgeom=YES
*Dynamic, Explicit
 , <stepDuration>, ,
*Fixed Mass Scaling, factor=<mass_scaling_factor>
**
*Boundary, AMPLITUDE=LoadUp
 Z+, 3, 3, <displacement>
**
*Parameter
 RFU_output_nset='Z+'
*Include, input=test_COH_outputs.inp
**
*End Step
